OpenVSP model (file version 5), 13 components.
Geometry view with OpenVSP parameter names; values to 6 digits, angles in degrees, lengths in the model's unit.
Overall bounding box: X_Min=-0.268075 X_Len=45.2693 Y_Min=-38.2288 Y_Len=76.4576 Z_Min=-4.32467 Z_Len=18.1922

Fuselage "FuselageGeom"
  location (X Y Z) 0 0 0, rotation 0 0 0
  bounding box size 45 6.6 7.20767
  Design: Length=45
  cross sections:
    n   CurveBasis  XLocPercent  YLocPercent  ZLocPercent  shape
    0   0           0            0            0.0204595    ellipse Ellipse_Height=2.70222 Ellipse_Width=2.10371
    1   0           0.0113333    0            0.0196716    ellipse Ellipse_Height=2.8888 Ellipse_Width=4.09538
    2   0           0.054        0            0.0189485    ellipse Ellipse_Height=3.44816 Ellipse_Width=5.08626
    3   0           0.0962222    0            0.0124838    ellipse Ellipse_Height=4.00207 Ellipse_Width=6.36303
    4   0           0.197778     0            0.0074556    ellipse Ellipse_Height=5.8 Ellipse_Width=6.6
    5   0           0.263111     0            0.00468142   ellipse Ellipse_Height=6.5 Ellipse_Width=6.6
    6   0           0.340889     0            0.00658867   ellipse Ellipse_Height=7.20767 Ellipse_Width=6.6
    7   0           0.596667     0            0.00554835   ellipse Ellipse_Height=6.04991 Ellipse_Width=6.6
    8   0           0.639333     0            -0.00814914  ellipse Ellipse_Height=4.94589 Ellipse_Width=6.6
    9   0           0.913556     0            0.000173386  ellipse Ellipse_Height=5.00058 Ellipse_Width=6.6
    10  0           1            0            0.0327352    ellipse Ellipse_Height=2.40816 Ellipse_Width=4.04082

Fuselage "Canopy", child of "FuselageGeom"
  location (X Y Z) 16.872 0 1.73077, rotation 0 0 0
  bounding box size 13.7921 5.70128 9.20565
  Design: Length=13.7921
  cross sections:
    n  CurveBasis  XLocPercent  YLocPercent  ZLocPercent  shape
    0  0           0            0            -0.096576    ellipse Ellipse_Height=6.71928 Ellipse_Width=5.70128
    1  0           0.253205     0            -0.0102298   ellipse Ellipse_Height=8.52969 Ellipse_Width=5.70128
    2  0           0.511867     0            -0.0159515   ellipse Ellipse_Height=9.20565 Ellipse_Width=5.70128
    3  0           0.770529     0            -0.0335874   ellipse Ellipse_Height=7.68698 Ellipse_Width=5.70128
    4  0           1            0            -0.2         ellipse Ellipse_Height=2.90606 Ellipse_Width=5.70128

Wing "WingGeom"
  location (X Y Z) 9 0 -0.942308, rotation 0 2.59615 0
  symmetric about XZ
  bounding box size 13.1758 76.4576 2.93083
  totals: TotalSpan=76.4722 TotalProjectedSpan=76.4256 TotalChord=11.1151 TotalArea=850 TotalAR=6.87162 MAC=11.2305
  root: chord 13.0766, twist 0, NACA 4-series Camber=0.04 CamberLoc=0.4 ThickChord=0.15
  sections:
    n  Span     Root_Chord  Tip_Chord  Area  Sweep  Sweep_Location  Dihedral  Twist  Twist_Location  tip airfoil
    1  38.2361  13.0766     9.15365    425   4.66   0               2         0      0.25            NACA 4-series Camber=0 CamberLoc=0.2 ThickChord=0.1
  SS_Control "SS_CONT_1": UStart=0.4 UEnd=0.6 Length_C_Start=0.25 Length_C_End=0.25 Length_Start=3.07301 Length_End=2.48456 LE_Flag=0 Surf_Type=2

Wing "Horzi Stab"
  location (X Y Z) 33.45 0 0.198718, rotation 0 0 0
  symmetric about XZ
  bounding box size 11.5512 23.8244 1.38677
  totals: TotalSpan=23.8244 TotalProjectedSpan=23.8244 TotalChord=7.94145 TotalArea=189.2 TotalAR=3 MAC=8.48838
  root: chord 11.5512, twist 0, NACA 4-series Camber=0 CamberLoc=0.2 ThickChord=0.12
  sections:
    n  Span     Root_Chord  Tip_Chord  Area  Sweep  Sweep_Location  Dihedral  Twist  Twist_Location  tip airfoil
    1  11.9122  11.5512     4.3317     94.6  30     0               0         0      0.25            NACA 4-series Camber=0 CamberLoc=0.2 ThickChord=0.1
  SS_Control "SS_CONT_0": UStart=0.4 UEnd=0.6 Length_C_Start=0.25 Length_C_End=0.25 Length_Start=2.52683 Length_End=1.4439 LE_Flag=0 Surf_Type=2

Wing "Vert Stab"
  location (X Y Z) 32.3 0 1.19872, rotation 90 0 0
  bounding box size 12.7006 1.2708 12.6689
  totals: TotalSpan=12.6689 TotalProjectedSpan=12.6689 TotalChord=8.44591 TotalArea=107 TotalAR=1.5 MAC=9.16036
  root: chord 12.7006, twist 0, NACA 4-series Camber=0 CamberLoc=0.2 ThickChord=0.1
  sections:
    n  Span     Root_Chord  Tip_Chord  Area  Sweep  Sweep_Location  Dihedral  Twist  Twist_Location  tip airfoil
    1  12.6689  12.7006     4.1912     107   30     0               0         0      0.25            as above
  SS_Control "SS_CONT_0": UStart=0.4 UEnd=0.6 Length_C_Start=0.25 Length_C_End=0.25 Length_Start=2.74968 Length_End=1.47327 LE_Flag=0 Surf_Type=2

Propeller "PropGeom"
  location (X Y Z) 0 0 0.819672, rotation 0 0 0
  bounding box size 0.526788 9.80613 10.2887
  Design: Diameter=10.6 NumBlade=5 Beta34=20 UseBeta34Flag=1 Feather=0 Rotate=0 Precone=0 ReverseFlag=0 FoldAngle=0 PropMode=0 AF=151.538 CLi=0.538798 Chord=0.177656 Solidity=0.282749 ConstructXoC=0.5 FeatherAxisXoC=0.5 FeatherOffsetXoC=0
  cross sections:
    n  RadiusFrac  shape
    0  0.2         ellipse Ellipse_Height=0.212 Ellipse_Width=0.424
    1  0.4         NACA 16-series Chord=0.881125 IdealCl=0.7 ThickChord=0.144074
    2  1           NACA 16-series Chord=0.689 IdealCl=0.2 ThickChord=0.03
  Chord along r/R (cubic Bezier): 0.2: 0.08, 0.333333: 0.15, 0.466667: 0.2, 0.6: 0.2, 0.716667: 0.2, 0.833333: 0.2, 0.95: 0.2, 0.966667: 0.2, 0.983333: 0.2, 1: 0.13
  Twist along r/R (PCHIP): 0.2: 46.75, 0.75: 20, 1: 13
  Thick along r/R (cubic Bezier): 0.2: 0.5, 0.233333: 0.3, 0.266667: 0.225, 0.3: 0.2, 0.4: 0.125, 0.5: 0.115, 0.6: 0.1, 0.733333: 0.075, 0.866667: 0.055, 1: 0.03
  CLI along r/R (cubic Bezier): 0.2: 0, 0.266667: 0.7, 0.333333: 0.7, 0.4: 0.7, 0.466667: 0.7, 0.533333: 0.7, 0.6: 0.7, 0.733333: 0.7, 0.866667: 0.7, 1: 0.2

Stack "Engine", child of "PropGeom"
  location (X Y Z) 1.3 0 0.8, rotation 0 0 0
  bounding box size 6.48 2.05 2.05
  mass: Density=1 Shell_Flag=0 Mass_Area=1 Mass_Prior=0 PointMass=894 CGx=0 CGy=0 CGz=0 Ixx=0 Iyy=0 Izz=0 Ixy=0 Ixz=0 Iyz=0
  cross sections:
    n  CurveBasis  VAlign  XDelta  XRotateAbs  XSAbsRelFlag  YDelta  YRotateAbs  ZDelta  ZRotateAbs  shape
    0  0           0       0       0           1             0       0           0       0           ellipse Ellipse_Height=2.05 Ellipse_Width=2.05
    1  0           0       6.48    0           1             0       0           0       0           as above

Custom "Payload"
  location (X Y Z) 23 0 -0.652174, rotation 0 0 0
  bounding box size 9 4 3
  Design: Height=3 Length=9 SquareFlag=0 Width=4
  custom script Box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

Custom "FuelTanks"
  location (X Y Z) 13 8 -0.6, rotation 0 0 0
  symmetric about XZ
  bounding box size 5 28.5 0.8
  Design: Height=0.8 Length=5 SquareFlag=0 Width=12.5
  custom script Box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

Human "Pilot"
  location (X Y Z) 21 0 2.28261, rotation 0 0 0
  bounding box size 3.15051 2.09957 4.50959
  mass: Density=68.4812 Shell_Flag=0 Mass_Area=1 Mass_Prior=0
  Anthropometric: Age=30 AutoDensity=1 BMI=27.7 BMI_pct=0.5 GenderFlag=0 LenUnit=4 Mass=188.306 MassUnit=3 SitFrac=0.51 Stature=5.76115 Stature_pct=0.5 Volume=2.74974

Custom "Seat"
  location (X Y Z) 21.0435 0 1.25, rotation 0 -90 0
  bounding box size 1.44599 1 2.87567
  Design: BackAngle=8 BackHeight=2.5 BackThick=0.2 SeatHeight=0.3 SeatLength=1 Width=1
  custom script Seat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

Mesh "MeshGeom"
  location (X Y Z) 0 0 0, rotation 0 0 0
  bounding box size 45 6.6 9.42093
  triangle mesh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

Mesh "MeshGeom"
  location (X Y Z) 0 0 0, rotation 0 0 0
  bounding box size 13.7921 5.70128 9.20565
  triangle mesh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

VSPAERO settings (reference component "WingGeom"): Sref=850 bref=76.4722 cref=11.1151 Xcg=15.0927 Ycg=0 Zcg=-0.4297 AlphaStart=-5 AlphaEnd=12 AlphaNpts=3 BetaStart=0 BetaEnd=0 BetaNpts=1 MachStart=0 MachEnd=0 MachNpts=1 ReCref=1e+07 Vinf=100 Rho=0.002377
