OpenVSP model (file version 5), 17 components.
Geometry view with OpenVSP parameter names; values to 6 digits, angles in degrees, lengths in the model's unit.
Overall bounding box: X_Min=-0.268075 X_Len=46.4715 Y_Min=-38.2288 Y_Len=76.4576 Z_Min=-6.79987 Z_Len=20.6674

Fuselage "FuselageGeom"
  location (X Y Z) 0 0 0, rotation 0 0 0
  bounding box size 46.471 6.6 7.20767
  Design: Length=45
  cross sections:
    n  CurveBasis  XLocPercent  YLocPercent  ZLocPercent  shape
    0  0           0            0            0.0183426    ellipse Ellipse_Height=1.81476 Ellipse_Width=2.0853
    1  0           0.0113333    0            0.019        ellipse Ellipse_Height=5.2 Ellipse_Width=5.25282
    2  0           0.054        0            0.019        ellipse Ellipse_Height=5.39535 Ellipse_Width=5.66596
    3  0           0.132845     0            0.008        ellipse Ellipse_Height=6.45796 Ellipse_Width=6.36303
    4  0           0.263111     0            0.00525912   ellipse Ellipse_Height=6.5 Ellipse_Width=6.6
    5  0           0.340889     0            0.00658867   ellipse Ellipse_Height=7.20767 Ellipse_Width=6.6
    6  0           0.600716     0            0.00554835   ellipse Ellipse_Height=6.5 Ellipse_Width=6.6
    7  0           0.714334     0            -0.00814914  ellipse Ellipse_Height=4.94589 Ellipse_Width=6.6
    8  0           0.957595     0            -0.00607077  ellipse Ellipse_Height=4.9 Ellipse_Width=6.0302
    9  0           1            0            0.023        ellipse Ellipse_Height=2.40816 Ellipse_Width=4.04082

Fuselage "Canopy", child of "FuselageGeom"
  location (X Y Z) 16.872 0 1.73077, rotation 0 0 0
  bounding box size 13.7921 5.70128 9.08163
  Design: Length=13.7921
  cross sections:
    n  CurveBasis  XLocPercent  YLocPercent  ZLocPercent  shape
    0  0           0            0            -0.096576    ellipse Ellipse_Height=6.71928 Ellipse_Width=5.70128
    1  0           0.253205     0            -0.0102298   ellipse Ellipse_Height=8.52969 Ellipse_Width=5.70128
    2  0           0.511867     0            -0.00797576  ellipse Ellipse_Height=9 Ellipse_Width=5.70128
    3  0           0.770529     0            -0.0335874   ellipse Ellipse_Height=7.68698 Ellipse_Width=5.70128
    4  0           1            0            -0.2         ellipse Ellipse_Height=2.90606 Ellipse_Width=5.70128

Custom "Seat", child of "Canopy"
  location (X Y Z) 21.0435 0 1.25, rotation 0 -90 0
  bounding box size 1.44599 1 2.87567
  Design: BackAngle=8 BackHeight=2.5 BackThick=0.2 SeatHeight=0.3 SeatLength=1 Width=1
  custom script Seat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

Human "Pilot", child of "Seat"
  location (X Y Z) 21 0 2.28261, rotation 0 0 0
  bounding box size 3.15051 2.09957 4.50959
  mass: Density=68.4812 Shell_Flag=0 Mass_Area=1 Mass_Prior=0
  Anthropometric: Age=30 AutoDensity=1 BMI=27.7 BMI_pct=0.5 GenderFlag=0 LenUnit=4 Mass=188.306 MassUnit=3 SitFrac=0.51 Stature=5.76115 Stature_pct=0.5 Volume=2.74974

Wing "WingGeom"
  location (X Y Z) 9 0 -0.942308, rotation 0 2.59615 0
  symmetric about XZ
  bounding box size 13.1758 76.4576 2.93083
  totals: TotalSpan=76.4722 TotalProjectedSpan=76.4256 TotalChord=11.1151 TotalArea=850 TotalAR=6.87162 MAC=11.2305
  root: chord 13.0766, twist 0, NACA 4-series Camber=0.04 CamberLoc=0.4 ThickChord=0.15
  sections:
    n  Span     Root_Chord  Tip_Chord  Area  Sweep  Sweep_Location  Dihedral  Twist  Twist_Location  tip airfoil
    1  38.2361  13.0766     9.15365    425   4.66   0               2         0      0.25            NACA 4-series Camber=0 CamberLoc=0.2 ThickChord=0.1
  SS_Control "Flaps": EtaStart=0.086 EtaEnd=0.6 Length_C_Start=0.25 Length_C_End=0.25 Length_Start=3.18482 Length_End=2.68071 LE_Flag=0 Surf_Type=2
  SS_Control "Aileron": EtaStart=0.6 EtaEnd=1 Length_C_Start=0.25 Length_C_End=0.25 Length_Start=2.68071 Length_End=2.28841 LE_Flag=0 Surf_Type=2

Wing "Horzi Stab"
  location (X Y Z) 33.45 0 0.198718, rotation 0 0 0
  symmetric about XZ
  bounding box size 11.5512 23.8244 1.38677
  totals: TotalSpan=23.8244 TotalProjectedSpan=23.8244 TotalChord=7.94145 TotalArea=189.2 TotalAR=3 MAC=8.48838
  root: chord 11.5512, twist 0, NACA 4-series Camber=0 CamberLoc=0.2 ThickChord=0.12
  sections:
    n  Span     Root_Chord  Tip_Chord  Area  Sweep  Sweep_Location  Dihedral  Twist  Twist_Location  tip airfoil
    1  11.9122  11.5512     4.3317     94.6  30     0               0         0      0.25            NACA 4-series Camber=0 CamberLoc=0.2 ThickChord=0.1
  SS_Control "Elevator": UStart=0.42 UEnd=1 Length_C_Start=0.45 Length_C_End=0.45 Length_Start=4.35336 Length_End=1.94927 LE_Flag=0 Surf_Type=2

Wing "Vert Stab"
  location (X Y Z) 32.3 0 1.19872, rotation 90 0 0
  bounding box size 12.7006 1.2708 12.6689
  totals: TotalSpan=12.6689 TotalProjectedSpan=12.6689 TotalChord=8.44591 TotalArea=107 TotalAR=1.5 MAC=9.16036
  root: chord 12.7006, twist 0, NACA 4-series Camber=0 CamberLoc=0.2 ThickChord=0.1
  sections:
    n  Span     Root_Chord  Tip_Chord  Area  Sweep  Sweep_Location  Dihedral  Twist  Twist_Location  tip airfoil
    1  12.6689  12.7006     4.1912     107   30     0               0         0      0.25            as above
  SS_Control "Rudder": EtaStart=0.0926829 EtaEnd=1 Length_C_Start=0.4 Length_C_End=0.4 Length_Start=4.76477 Length_End=1.67648 LE_Flag=0 Surf_Type=0

Propeller "PropGeom"
  location (X Y Z) 0 0 0.819672, rotation 0 0 0
  bounding box size 0.526788 9.80613 10.2887
  Design: Diameter=10.6 NumBlade=5 Beta34=20 UseBeta34Flag=1 Feather=0 Rotate=0 Precone=0 ReverseFlag=0 FoldAngle=0 PropMode=0 AF=151.538 CLi=0.538798 Chord=0.177656 Solidity=0.282749 ConstructXoC=0.5 FeatherAxisXoC=0.5 FeatherOffsetXoC=0
  cross sections:
    n  RadiusFrac  shape
    0  0.2         ellipse Ellipse_Height=0.212 Ellipse_Width=0.424
    1  0.4         NACA 16-series Chord=0.881125 IdealCl=0.7 ThickChord=0.144074
    2  1           NACA 16-series Chord=0.689 IdealCl=0.2 ThickChord=0.03
  Chord along r/R (cubic Bezier): 0.2: 0.08, 0.333333: 0.15, 0.466667: 0.2, 0.6: 0.2, 0.716667: 0.2, 0.833333: 0.2, 0.95: 0.2, 0.966667: 0.2, 0.983333: 0.2, 1: 0.13
  Twist along r/R (PCHIP): 0.2: 46.75, 0.75: 20, 1: 13
  Thick along r/R (cubic Bezier): 0.2: 0.5, 0.233333: 0.3, 0.266667: 0.225, 0.3: 0.2, 0.4: 0.125, 0.5: 0.115, 0.6: 0.1, 0.733333: 0.075, 0.866667: 0.055, 1: 0.03
  CLI along r/R (cubic Bezier): 0.2: 0, 0.266667: 0.7, 0.333333: 0.7, 0.4: 0.7, 0.466667: 0.7, 0.533333: 0.7, 0.6: 0.7, 0.733333: 0.7, 0.866667: 0.7, 1: 0.2

Custom "Cooling Intake", child of "PropGeom"
  location (X Y Z) 2 0 0.82, rotation 0 0 0
  bounding box size 3 5.20026 5.27112
  Design: Camber=0 CamberLoc=0.2 Chord=3 Height=4.45 InvertFlag=0 Shape=0 ThickChord=0.25 Width=4.45
  custom script Duct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

Stack "Engine", child of "Cooling Intake"
  location (X Y Z) 1.67213 0 0.82, rotation 0 0 0
  bounding box size 5.88 4.7 4.7
  mass: Density=1 Shell_Flag=0 Mass_Area=1 Mass_Prior=0 PointMass=2749 CGx=0 CGy=0 CGz=0 Ixx=0 Iyy=0 Izz=0 Ixy=0 Ixz=0 Iyz=0
  cross sections:
    n  CurveBasis  VAlign  XDelta  XRotateAbs  XSAbsRelFlag  YDelta  YRotateAbs  ZDelta  ZRotateAbs  shape
    0  0           0       0       0           1             0       0           0       0           ellipse Ellipse_Height=4.7 Ellipse_Width=4.7
    1  0           0       5.88    0           1             0       0           0       0           as above

Custom "Cooling Exit", child of "Cooling Intake"
  location (X Y Z) 7.28599 0 0.193913, rotation 0 0 0
  bounding box size 1.5 6.02009 6.10215
  Design: Camber=0 CamberLoc=0.2 Chord=1.5 Height=5.87 InvertFlag=0 Shape=0 ThickChord=0.1 Width=5.87
  custom script Duct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

Custom "Payload"
  location (X Y Z) 23 0 -0.652174, rotation 0 0 0
  bounding box size 9 4 3
  Design: Height=3 Length=9 SquareFlag=0 Width=4
  custom script Box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

Custom "FuelTanks"
  location (X Y Z) 13 8 -0.6, rotation 0 0 0
  symmetric about XZ
  bounding box size 5 28.5 0.8
  Design: Height=0.8 Length=5 SquareFlag=0 Width=12.5
  custom script Box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

Custom "Front Gear Arm"
  location (X Y Z) 13.24 3.26046 -3.37267, rotation 36.8375 10 0
  symmetric about XZ
  bounding box size 1.30004 9.27992 3.25146
  Design: Height=3.46 Length=0.71 SquareFlag=0 Width=0.71
  custom script Box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

Gear "Front Gear", child of "Front Gear Arm"
  location (X Y Z) 13.24 4.89253 -6.34079, rotation 0 0 0
  symmetric about XZ
  bounding box size 4.03333 11.1517 4.03333
  Gear: GearConfigMode=0
  bogie "BOGIE_0": NumAcross=1 NumTandem=1 Spacing=1.50333 Pitch=4.43667 Symmetrical=0 XContactPt=0 YContactPt=0 TravelCompressed=1 TravelExtended=1 SteeringAngle=0.548387 DiameterModel=4.03333 WidthModel=1.36667 PlyRating=20

Custom "Rear Gear Arm"
  location (X Y Z) 43.0826 0 -3.08869, rotation 0 -33.6413 0
  bounding box size 0.739932 0.23 0.951615
  Design: Height=0.99 Length=0.23 SquareFlag=0 Width=0.23
  custom script Box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

Gear "Rear Gear", child of "Rear Gear Arm"
  location (X Y Z) 43.44 0 -3.91667, rotation 0 0 0
  bounding box size 1.34167 0.459889 1.34167
  Gear: GearConfigMode=0
  bogie "BOGIE_0": NumAcross=1 NumTandem=1 Spacing=0.495 Pitch=1.47583 Symmetrical=0 XContactPt=0 YContactPt=0 TravelCompressed=1 TravelExtended=1 SteeringAngle=0.548387 DiameterModel=1.34167 WidthModel=0.45 PlyRating=20
